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/batch
! ANSYS input file written by Workbench version 18.2 RELEASE
! File used for geometry attach: C:\Users\kmlee\Desktop\cae project\Final Project_files\dp0\SYS-1\DM\SYS-1.agdb
/title,Final Project--Static Structural (B5)
/com,--- Data in consistent NMM units. See Solving Units in the help system for more information.
/units,MPA
/prep7
! Turn off shape checking because checks already performed inside WB mesher.
! See help system for more information.
SHPP,OFF,,NOWARN
etcon,set             ! allow ANSYS to choose best KEYOP's for 180x elements
/com,*********** Nodes for the whole assembly ***********
nblock,3,,706
(1i9,3e20.9e3)
        1    7.592847490E+001   -2.500000000E+000    3.166667029E+000
        2    6.935694980E+001   -2.500000000E+000    3.166667013E+000
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-1
/com,*********** Elements for Body 1 "Solid" ***********
et,1,186
keyo,1,2,1          ! set full integration on SOLID186
eblock,19,solid,,72
(19i9)
        1        1        1        1        0        0        0        0       20        0        1       46      189      190      195       47      104      103       99
      362      632      633      363      367      502      494      366      361      505      503      495
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-1
/com,*********** Send User Defined Coordinate System(s) ***********
csys,0
toffst,273.15,  ! Temperature offset from absolute zero
/com,*********** Set Reference Temperature ***********
tref,22.
/com,*********** Send Materials ***********
MP,DENS,1,7.85e-09,	! tonne mm^-3
MP,ALPX,1,1.2e-05,	! C^-1
MP,C,1,434000000,	! mm^2 s^-2 C^-1
MP,KXX,1,60.5,	! tonne mm s^-3 C^-1
MP,RSVX,1,0.00017,	! ohm mm
MP,EX,1,200000,	! tonne s^-2 mm^-1
MP,NUXY,1,0.3,
MP,MURX,1,10000,

!************************* Model Summary ********************
!Solid,	Structural Steel,	matid,	1
!************************* End Model Summary ********************
/com,*********** Fixed Supports ***********
CMBLOCK,_FIXEDSU,NODE,       18
(8i10)
       127       128       129       130       163       164       165       166
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cmsel,s,_FIXEDSU
d,all,all
nsel,all
/com,*********** Create Displacement Tables and Functions ******

*DIM,_loadvari32xp,TABLE,2,1,1,TIME,
! Time values
_loadvari32xp(1,0,1) = 0.
_loadvari32xp(2,0,1) = 1.
! Load values
_loadvari32xp(1,1,1) = 0.
_loadvari32xp(2,1,1) = -20.


*DIM,_loadvari32xn,TABLE,2,1,1,TIME,
! Time values
_loadvari32xn(1,0,1) = 0.
_loadvari32xn(2,0,1) = 1.
! Load values
_loadvari32xn(1,1,1) = -0.
_loadvari32xn(2,1,1) = 20.

fini
/com,****************************************************************************
/com,*************************    SOLUTION       ********************************
/com,****************************************************************************
/solu
antype,0                   ! static analysis
eqsl,sparse,,,,,1
cntr,print,1               ! print out contact info and also make no initial contact an error
dmpoption,emat,no             ! Don't combine emat file for DANSYS
dmpoption,esav,no             ! Don't combine esav file for DANSYS
nldiag,cont,iter           ! print out contact info each equilibrium iteration
rescontrol,,none                 ! Do not keep any restart files
/com,****************************************************
/com,******************* SOLVE FOR LS 1 OF 1 ****************
/com,*** Set Displacements ***
CMBLOCK,_CM32UX_XP,NODE,       18
(8i10)
        97        98        99       103       190       194       195       196
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cmsel,s,_CM32UX_XP
d,all,ux,%_loadvari32xp%
nsel,all

/com,*** Component For All Non-Zero UX Displacements ***
cmsel,s,_CM32ux_xp
cm,_DISPNONZEROUX,NODE
nsel,all

nsub,1,1,1
time,1.
outres,erase
outres,all,none
outres,nsol,all
outres,rsol,all
outres,strs,all
outres,epel,all
outres,eppl,all
stabilize,off                   ! Stabilization turned OFF by user
! *********** WB SOLVE COMMAND ***********
! check interactive state
*get,ANSINTER_,active,,int
*if,ANSINTER_,ne,0,then
/eof
*endif
solve
/com *************** Write FE CONNECTORS *********
CEWRITE,file,ce,,INTE
/com,****************************************************
/com,*************** FINISHED SOLVE FOR LS 1 *************
/post1
fini
