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/batch
! ANSYS input file written by Workbench version 18.2 RELEASE
! File used for geometry attach: C:\Users\kmlee\Desktop\cae project\Final Project_files\dp0\SYS\DM\SYS.agdb
/title,Final Project--Magnetostatic (A5)
/com,--- Data in consistent MKS units. See Solving Units in the help system for more information.
/units,MKS
/prep7
! Turn off shape checking because checks already performed inside WB mesher.
! See help system for more information.
SHPP,OFF,,NOWARN
etcon,set             ! allow ANSYS to choose best KEYOP's for 180x elements
/com,*********** Nodes for the whole assembly ***********
nblock,3,,8078
(1i9,3e20.9e3)
        1    5.000000000E-003    1.450039095E-002    4.241289378E-003
        2    5.000000000E-003    1.450039095E-002   -7.587106222E-004
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-1
/com,*********** Elements for Body 1 "Pole1" ***********
et,1,117
eblock,19,solid,,8
(19i9)
        1        1        1        1        0        0        0        0       20        0        1       40      477      478      479      172      182      183      178
     1404     4111     4115     1405     2230     2309     2274     2229     1403     2314     2321     2275
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-1
/com,*********** Elements for Body 2 "Pole2" ***********
et,2,117
eblock,19,solid,,8
(19i9)
        2        2        1        2        0        0        0        0       20        0        9       43      482      483      493      187      197      196      190
     1424     4135     4144     1426     2353     2423     2378     2351     1423     2432     2424     2379
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-1
/com,*********** Elements for Body 3 "BackBar" ***********
et,3,117
eblock,19,solid,,64
(19i9)
        3        3        1        3        0        0        0        0       20        0       17        1      542      551      554       50      543      550      557
     1216     4490     4549     1217     1480     4495     4542     1481     1214     4489     4541     4568
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-1
/com,*********** Elements for Body 4 "Specimen" ***********
et,4,117
eblock,19,solid,,144
(19i9)
        4        4        1        4        0        0        0        0       20        0       81      155      613      610      604      227      355      365      364
     2131     4857     4826     2130     2668     3343     3401     2669     2129     3344     3407     3402
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-1
/com,*********** Elements for Body 5 "coil_A1" ***********
et,5,117
eblock,19,solid,,20
(19i9)
        5        5        1        5       12        0        0        0       20        0      225       22      686      661      650      159      687      660      654
     1311     5158     5094     1310     2160     5150     5116     2159     1307     5302     5149     5093
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-1
/com,*********** Elements for Body 6 "coil_A3" ***********
et,6,117
eblock,19,solid,,20
(19i9)
        6        6        1        6       14        0        0        0       20        0      245       26      708      683      677      163      709      682      678
     1332     5282     5258     1331     2187     5279     5263     2186     1328     5380     5278     5257
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-1
/com,*********** Elements for Body 7 "coil_A2" ***********
et,7,117
eblock,19,solid,,20
(19i9)
        7        7        1        7       13        0        0        0       20        0      265       30      698      673      688      167      702      672      689
     1353     5236     5235     1351     2208     5229     5228     2206     1349     5341     5227     5306
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-1
/com,*********** Elements for Body 8 "coil_A4" ***********
et,8,117
eblock,19,solid,,20
(19i9)
        8        8        1        8       15        0        0        0       20        0      285       34      710      683      708      171      717      682      709
     1373     5283     5282     1372     2225     5280     5279     2224     1370     5382     5278     5380
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-1
/com,*********** Elements for Body 9 "air" ***********
et,9,117
eblock,19,solid,,3175
(19i9)
        9        9        1        9        0        0        0        0       20        0      305      335     1026      634      634      971      971      971      971
     3218     4984      634     3215      971      971      971      971     3216     7094     4982     4982
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-1
et,10,117
eblock,19,solid,,680
(19i9)
        9       10        1        9        0        0        0        0       20        0     3480      445      459      690      685     1098     1098     1098     1098
     3920     4007     5295     3921     1098     1098     1098     1098     3926     4011     5310     5299
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-1
/com,*********** Send User Defined Coordinate System(s) ***********
local,12,0,2.0851449122718e-002,0.,-9.82067168891555e-019,-0.,-90.,0.
local,13,0,6.87499966729844e-003,3.20845837131947e-020,-1.4611742668161e-002,90.,-0.,90.
local,14,0,-7.1014491002491e-003,0.,4.91033590013036e-019,-90.,90.,-90.
local,15,0,6.87499966729844e-003,-8.02114592829867e-020,1.4611742668161e-002,-90.,-5.88991597848571e-015,-90.
csys,0
toffst,273.15,  ! Temperature offset from absolute zero
/com,*********** Set Reference Temperature ***********
tref,22.
/com,*********** Send Materials ***********

TB,BH,1,,29
TBPT,,210.024,0.187
TBPT,,245.028,0.246
TBPT,,315.036,0.328
TBPT,,385.839,0.421
TBPT,,420.843,0.503
TBPT,,490.851,0.62
TBPT,,560.859,0.725
TBPT,,630.867,0.795
TBPT,,665.871,0.854
TBPT,,700.875,0.901
TBPT,,803.5,0.982
TBPT,,946.698,1.06
TBPT,,1153.54,1.16
TBPT,,1296.74,1.22
TBPT,,1678.6,1.32
TBPT,,1996.82,1.38
TBPT,,2490.06,1.45
TBPT,,3118.54,1.51
TBPT,,3747.02,1.56
TBPT,,4558.47,1.61
TBPT,,5361.97,1.65
TBPT,,6165.47,1.69
TBPT,,7438.35,1.75
TBPT,,8750.99,1.79
TBPT,,9864.76,1.82
TBPT,,11058.1,1.85
TBPT,,12569.6,1.88
TBPT,,14240.3,1.91
TBPT,,15672.2,1.93


TB,BH,2,,29
TBPT,,210.024,0.187
TBPT,,245.028,0.246
TBPT,,315.036,0.328
TBPT,,385.839,0.421
TBPT,,420.843,0.503
TBPT,,490.851,0.62
TBPT,,560.859,0.725
TBPT,,630.867,0.795
TBPT,,665.871,0.854
TBPT,,700.875,0.901
TBPT,,803.5,0.982
TBPT,,946.698,1.06
TBPT,,1153.54,1.16
TBPT,,1296.74,1.22
TBPT,,1678.6,1.32
TBPT,,1996.82,1.38
TBPT,,2490.06,1.45
TBPT,,3118.54,1.51
TBPT,,3747.02,1.56
TBPT,,4558.47,1.61
TBPT,,5361.97,1.65
TBPT,,6165.47,1.69
TBPT,,7438.35,1.75
TBPT,,8750.99,1.79
TBPT,,9864.76,1.82
TBPT,,11058.1,1.85
TBPT,,12569.6,1.88
TBPT,,14240.3,1.91
TBPT,,15672.2,1.93


TB,BH,3,,29
TBPT,,210.024,0.187
TBPT,,245.028,0.246
TBPT,,315.036,0.328
TBPT,,385.839,0.421
TBPT,,420.843,0.503
TBPT,,490.851,0.62
TBPT,,560.859,0.725
TBPT,,630.867,0.795
TBPT,,665.871,0.854
TBPT,,700.875,0.901
TBPT,,803.5,0.982
TBPT,,946.698,1.06
TBPT,,1153.54,1.16
TBPT,,1296.74,1.22
TBPT,,1678.6,1.32
TBPT,,1996.82,1.38
TBPT,,2490.06,1.45
TBPT,,3118.54,1.51
TBPT,,3747.02,1.56
TBPT,,4558.47,1.61
TBPT,,5361.97,1.65
TBPT,,6165.47,1.69
TBPT,,7438.35,1.75
TBPT,,8750.99,1.79
TBPT,,9864.76,1.82
TBPT,,11058.1,1.85
TBPT,,12569.6,1.88
TBPT,,14240.3,1.91
TBPT,,15672.2,1.93

MP,DENS,4,1800,	! kg m^-3
MP,ALPX,4,2.6e-05,	! C^-1
MP,C,4,1024,	! J kg^-1 C^-1
MP,KXX,4,156,	! W m^-1 C^-1
MP,RSVX,4,9.2e-08,	! kg m^3 A^-2 s^-3
MP,EX,4,45000000000,	! Pa
MP,NUXY,4,0.35,
MP,MURX,4,1.000012,

MP,DENS,5,8300,	! kg m^-3
MP,ALPX,5,1.8e-05,	! C^-1
MP,C,5,385,	! J kg^-1 C^-1
MP,KXX,5,401,	! W m^-1 C^-1
MPTEMP,,,,,,,,
MPTEMP,1,0
MPTEMP,2,20
MPTEMP,3,100
MPDATA,RSVX,5, ,1.548e-08,1.694e-08,2.277e-08,	! kg m^3 A^-2 s^-3
MPTEMP,,,,,,,,
MP,EX,5,110000000000,	! Pa
MP,NUXY,5,0.34,
MP,MURX,5,1,

MP,DENS,6,8300,	! kg m^-3
MP,ALPX,6,1.8e-05,	! C^-1
MP,C,6,385,	! J kg^-1 C^-1
MP,KXX,6,401,	! W m^-1 C^-1
MPTEMP,,,,,,,,
MPTEMP,1,0
MPTEMP,2,20
MPTEMP,3,100
MPDATA,RSVX,6, ,1.548e-08,1.694e-08,2.277e-08,	! kg m^3 A^-2 s^-3
MPTEMP,,,,,,,,
MP,EX,6,110000000000,	! Pa
MP,NUXY,6,0.34,
MP,MURX,6,1,

MP,DENS,7,8300,	! kg m^-3
MP,ALPX,7,1.8e-05,	! C^-1
MP,C,7,385,	! J kg^-1 C^-1
MP,KXX,7,401,	! W m^-1 C^-1
MPTEMP,,,,,,,,
MPTEMP,1,0
MPTEMP,2,20
MPTEMP,3,100
MPDATA,RSVX,7, ,1.548e-08,1.694e-08,2.277e-08,	! kg m^3 A^-2 s^-3
MPTEMP,,,,,,,,
MP,EX,7,110000000000,	! Pa
MP,NUXY,7,0.34,
MP,MURX,7,1,

MP,DENS,8,8300,	! kg m^-3
MP,ALPX,8,1.8e-05,	! C^-1
MP,C,8,385,	! J kg^-1 C^-1
MP,KXX,8,401,	! W m^-1 C^-1
MPTEMP,,,,,,,,
MPTEMP,1,0
MPTEMP,2,20
MPTEMP,3,100
MPDATA,RSVX,8, ,1.548e-08,1.694e-08,2.277e-08,	! kg m^3 A^-2 s^-3
MPTEMP,,,,,,,,
MP,EX,8,110000000000,	! Pa
MP,NUXY,8,0.34,
MP,MURX,8,1,

MP,DENS,9,1.225,	! kg m^-3
MP,C,9,1006.43,	! J kg^-1 C^-1
MP,KXX,9,0.0242,	! W m^-1 C^-1
MP,VISC,9,1.7894e-05,	! Pa s
MP,MURX,9,1,
MP,SONC,9,346.25,	! m s^-1

!************************* Model Summary ********************
!Pole1,	1018 Steel 90.5 HRB,	matid,	1
!Pole2,	1018 Steel 90.5 HRB,	matid,	2
!BackBar,	1018 Steel 90.5 HRB,	matid,	3
!Specimen,	Magnesium Alloy 2,	matid,	4
!coil_A1,	Copper Alloy,	matid,	5
!coil_A3,	Copper Alloy,	matid,	6
!coil_A2,	Copper Alloy,	matid,	7
!coil_A4,	Copper Alloy,	matid,	8
!air,	Air,	matid,	9
!************************* End Model Summary ********************
/com,*********** Send Named Selection as Node Component ***********
CMBLOCK,OPEN_DOMAIN,NODE,      482
(8i10)
       726       727       728       729       730       731       732       733
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/com,*********** Set KEYOP for Solid Conductors ***********
keyo,8,1,0
keyo,5,1,0
keyo,7,1,0
keyo,6,1,0
/com,*********** Create FluxPar ***********
CMBLOCK,_CM81   ,NODE,      482
(8i10)
       726       727       728       729       730       731       732       733
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d,_CM81,az,0
nsel,all
/com,*********** Create Coil Current ***********
esel,none
esel,a,mat,,5
esel,a,mat,,6,8
cm,_CM87,elem
esel,all

*DIM,_loadvari87,TABLE,2,1,1,TIME,
! Time values
_loadvari87(1,0,1) = 0.
_loadvari87(2,0,1) = 1.
! Load values
_loadvari87(1,1,1) = 0.
_loadvari87(2,1,1) = 1600000.

emid,straight     ! straighten miside nodes
fini
/com,****************************************************************************
/com,*************************    SOLUTION       ********************************
/com,****************************************************************************
/solu
!eqsl,sparse               ! using sparse solver which is default so no eqsl command needed
outres,all,all
/com,****************************************************
/com,******************* SOLVE FOR LS 1 ****************
bfe,_CM87,js,2,%_loadvari87%
autots,on                  ! Workbench turned on automatic time stepping
nsub,1,10,1               ! Workbench default program controlled option
time,1.
outres,erase
outres,all,none
outres,all,all
cnvtol,csg,,,,1e-6                     ! program controlled option
! *********** WB SOLVE COMMAND ***********
! check interactive state
*get,ANSINTER_,active,,int
*if,ANSINTER_,ne,0,then
/eof
*endif
solve
/com *************** Write FE CONNECTORS *********
CEWRITE,file,ce,,INTE
/com,****************************************************
/com,*************** FINISHED SOLVE FOR LS 1 *************
/post1
fini
